<Lems xmlns="http://www.neuroml.org/lems/0.7.3"
      xmlns:xsi="http://www.w3.org/2001/XMLSchema-instance"
      xsi:schemaLocation="http://www.neuroml.org/lems/0.7.3 LEMS_v0.7.3.xsd">

    <!-- Voltage-dependent time constant that has a sigmoid shape and an offset -->
	<ComponentType name="sigmoidOffsetTimeCourse" extends="baseVoltageDepTime">

        <Parameter name="offset" dimension="time" />
        <Parameter name="rate" dimension="time" />
        <Parameter name="midpoint" dimension="voltage" />
        <Parameter name="scale" dimension="voltage" />

        <Dynamics>
            <DerivedVariable name="t" exposure="t" value="offset + rate / (1 + exp(0 - (v - midpoint)/scale))" />
        </Dynamics>

    </ComponentType>

</Lems>
